from copy import deepcopy
import importlib
import math
import os
import re
from typing import List, Optional, Tuple
import logging
import numpy as np
from .simulation import Simulation
from ..device import Device


class SofaBeamAdapter(Simulation):
    def __init__(
        self,
        friction: float = 0.1,
        dt_simulation: float = 0.006,
    ) -> None:
        self.logger = logging.getLogger(self.__module__)

        self.friction = friction
        self.dt_simulation = dt_simulation

        self.root = None
        self.camera = None
        self.target_node = None
        self.interim_target_node = None
        self.interim_targets = []
        self.simulation_error = False

        self.init_visual_nodes = False
        self.display_size = (1, 1)
        self.target_size = 1
        self.interim_target_size = 1

        self._vessel_object = None
        self._instruments_combined = None

        self._sofa = None
        self._sofa_runtime = None

        self._insertion_point = np.empty(())
        self._insertion_direction = np.empty(())
        self._mesh_path: str = None
        self._reset_add_visual: bool = None
        self._display_size = None
        self._coords_high = np.empty(())
        self._coords_low = np.empty(())
        self._target_size = None
        self._vessel_visual_path: str = None
        self._rng = np.random.default_rng()
        self._dof_positions = None
        self._inserted_lengths = None
        self._rotations = None

    @property
    def dof_positions(self) -> np.ndarray:
        return self._dof_positions

    @property
    def inserted_lengths(self) -> List[float]:
        return self._inserted_lengths

    @property
    def rotations(self) -> List[float]:
        return self._rotations

    def close(self):
        self._unload_simulation()

    def _unload_simulation(self):
        if self.root is not None:
            self._sofa.Simulation.unload(self.root)

    def step(self, action: np.ndarray, duration: float):
        n_steps = int(duration / self.dt_simulation)
        for _ in range(n_steps):
            inserted_lengths = self.inserted_lengths

            if len(inserted_lengths) > 1: # Multiple devices
                max_id = np.argmax(inserted_lengths)
                new_length = inserted_lengths + action[:, 0] * self.dt_simulation
                new_max_id = np.argmax(new_length)
                if max_id != new_max_id: # Check if another device would become longest
                    # Cancel movement of the device that would no longer be longest
                    if abs(action[max_id, 0]) > abs(action[new_max_id, 0]):
                        action[new_max_id, 0] = 0.0
                    else:
                        action[max_id, 0] = 0.0

            # Apply action
            x_tip = self._instruments_combined.m_ircontroller.xtip
            tip_rot = self._instruments_combined.m_ircontroller.rotationInstrument
            for i in range(action.shape[0]):
                x_tip[i] += float(action[i][0] * self.root.dt.value)
                tip_rot[i] += float(action[i][1] * self.root.dt.value)
            self._instruments_combined.m_ircontroller.xtip = x_tip
            self._instruments_combined.m_ircontroller.rotationInstrument = tip_rot
            self._sofa.Simulation.animate(self.root, self.root.dt.value)
        self._update_properties()

    def reset_devices(self):
        x = self._instruments_combined.m_ircontroller.xtip.value
        self._instruments_combined.m_ircontroller.xtip.value = x * 0.0
        ri = self._instruments_combined.m_ircontroller.rotationInstrument.value
        ri = self._rng.random(ri.shape) * 2 * np.pi
        self._instruments_combined.m_ircontroller.rotationInstrument.value = ri
        self._instruments_combined.m_ircontroller.indexFirstNode.value = 0
        self._sofa.Simulation.reset(self.root)
        self._update_properties()

    def reset(
        self,
        insertion_point,
        insertion_direction,
        mesh_path,
        devices: List[Device],
        centerlines=None,
        coords_high: Optional[Tuple[float, float, float]] = None,
        coords_low: Optional[Tuple[float, float, float]] = None,
        vessel_visual_path: Optional[str] = None,
        seed: int = None,
    ):
        if seed is not None:
            self._rng = np.random.default_rng(seed)
        if self._sofa is None:
            self._sofa = importlib.import_module("Sofa")
        if self._sofa_runtime is None:
            self._sofa_runtime = importlib.import_module("SofaRuntime")

        if (
            self.root is None
            or np.any(insertion_point != self._insertion_point)
            or np.any(insertion_direction != self._insertion_direction)
            or mesh_path != self._mesh_path
            or vessel_visual_path != self._vessel_visual_path
            or np.any(coords_high != self._coords_high)
            or np.any(coords_low != self._coords_low)
            # or self.init_visual_nodes
        ):
            if self.root is None:
                self.root = self._sofa.Core.Node()
            else:
                self._unload_simulation()

            self.root.gravity = [0.0, 0.0, 0.0]
            self.root.dt = self.dt_simulation
            self._load_plugins()
        self._basic_setup(self.friction)
        self._add_vessel_tree(mesh_path=mesh_path)
        self._add_devices(
            devices=devices,
            insertion_point=insertion_point,
            insertion_direction=insertion_direction,
        )
        if self.init_visual_nodes:
            self._add_visual(
                self.display_size,
                coords_low,
                coords_high,
                self.target_size,
                self.interim_target_size,
                devices=devices,
                insertion_point=insertion_point,
                centerlines=centerlines,
                vessel_visual_path=vessel_visual_path,
            )

            self._sofa.Simulation.init(self.root)
            self._insertion_point = insertion_point
            self._insertion_direction = insertion_direction
            self._mesh_path = mesh_path
            self._coords_high = coords_high
            self._coords_low = coords_low
            self._vessel_visual_path = vessel_visual_path
            self.simulation_error = False
            self.logger.debug("Sofa Initialized")
        self._update_properties()

    def _update_properties(self) -> None:
        tracking = self._instruments_combined.DOFs.position.value[:, 0:3][::-1]
        if np.any(np.isnan(tracking[0])):
            self.logger.warning("Tracking is NAN, resetting devices")
            self.simulation_error = True
            # self.reset_devices()
            tracking = self._instruments_combined.DOFs.position.value[:, 0:3][::-1]
        self._dof_positions = deepcopy(tracking)
        self._inserted_lengths = deepcopy(
            self._instruments_combined.m_ircontroller.xtip.value
        )
        self._rotations = deepcopy(
            self._instruments_combined.m_ircontroller.rotationInstrument.value
        )

    def _load_plugins(self):
        self.root.addObject("RequiredPlugin", name="BeamAdapter")
        self.root.addObject(
            "RequiredPlugin",
            name="SOFA Modules",
            pluginName="Sofa.Component.AnimationLoop "
            "Sofa.Component.Collision.Detection.Algorithm "
            "Sofa.Component.Collision.Detection.Intersection "
            "Sofa.Component.Collision.Geometry "
            "Sofa.Component.Collision.Response.Contact "
            "Sofa.Component.Constraint.Lagrangian.Correction "
            "Sofa.Component.Constraint.Lagrangian.Solver "
            "Sofa.Component.Constraint.Projective "
            "Sofa.Component.IO.Mesh "
            "Sofa.Component.LinearSolver.Direct "
            "Sofa.Component.LinearSolver.Iterative "
            "Sofa.Component.ODESolver.Backward "
            "Sofa.Component.SolidMechanics.FEM.Elastic "
            "Sofa.Component.SolidMechanics.Spring "
            "Sofa.Component.Topology.Container.Constant "
            "Sofa.Component.Topology.Container.Dynamic "
            "Sofa.Component.Topology.Container.Grid "
            "Sofa.Component.Topology.Mapping "
            "Sofa.Component.Mapping.Linear "
            "Sofa.Component.Mapping.NonLinear "
            "Sofa.Component.Mass "
            "Sofa.Component.SceneUtility "
            "Sofa.Component.StateContainer "
            "Sofa.Component.Visual "
            "Sofa.GL.Component.Rendering3D "
            "Sofa.GL.Component.Shader",
        )

    def _basic_setup(self, friction: float):
        self.root.addObject("FreeMotionAnimationLoop")
        self.root.addObject("CollisionPipeline", draw="0", depth="6", verbose="1")
        self.root.addObject("BruteForceBroadPhase")
        self.root.addObject("BVHNarrowPhase")
        self.root.addObject(
            "LocalMinDistance",
            contactDistance=0.3,
            alarmDistance=0.5,
            angleCone=0.02,
            name="localmindistance",
        )
        self.root.addObject(
            "CollisionResponse", response="FrictionContactConstraint"
        )
        self.root.addObject(
            "LCPConstraintSolver",
            mu=friction,
            tolerance=1e-4,
            maxIt=2000,
            name="LCP",
            build_lcp=False,
        )

    def _add_vessel_tree(self, mesh_path):
        vessel_object = self.root.addChild("vesselTree")
        vessel_object.addObject(
            "MeshOBJLoader",
            filename=mesh_path,
            flipNormals=False,
            name="meshLoader",
        )
        vessel_object.addObject(
            "MeshTopology",
            position="@meshLoader.position",
            triangles="@meshLoader.triangles",
        )
        vessel_object.addObject("MechanicalObject", name="dofs", src="@meshLoader")
        vessel_object.addObject("TriangleCollisionModel", moving=False, simulated=False)
        vessel_object.addObject("LineCollisionModel", moving=False, simulated=False)
        self._vessel_object = vessel_object

    def _add_devices(self, devices: List[Device], insertion_point, insertion_direction):
        device_beam_counts = []  # Track total beams per device for topology
        insertion_pose = self._calculate_insertion_pose(
            insertion_point, insertion_direction
        )

        for device in devices:
            sofa_device = device.sofa_device
            topo_lines = self.root.addChild("topolines_" + device.name)
            if not sofa_device.is_a_procedural_shape:
                topo_lines.addObject(
                    "MeshOBJLoader",
                    filename=device.sofa_device.mesh_path,
                    name="loader",
                )

            # Create material sections (SOFA 2.5 requirement)
            # Convert density_of_beams to sum for straight section
            straight_beams = self._to_int_sum(sofa_device.density_of_beams)

            # Create straight section material
            straight_section = topo_lines.addObject(
                "RodStraightSection",
                name="StraightSection_" + device.name,
                length=sofa_device.straight_length,
                radius=sofa_device.radius,
                youngModulus=sofa_device.young_modulus,
                massDensity=sofa_device.mass_density,
                poissonRatio=sofa_device.poisson_ratio,
                nbBeams=straight_beams,
                nbEdgesCollis=self._to_int_sum(sofa_device.num_edges_collis),
                nbEdgesVisu=sofa_device.num_edges,
            )

            # Create spire section material if there is a spire (curved tip)
            spire_length = sofa_device.length - sofa_device.straight_length
            materials_ref = "@StraightSection_" + device.name
            total_device_beams = straight_beams

            if spire_length > 0 and sofa_device.spire_diameter > 0:
                spire_section = topo_lines.addObject(
                    "RodSpireSection",
                    name="SpireSection_" + device.name,
                    length=spire_length,
                    radius=sofa_device.radius_extremity,
                    youngModulus=sofa_device.young_modulus_extremity,
                    massDensity=sofa_device.mass_density_extremity,
                    poissonRatio=sofa_device.poisson_ratio,
                    spireDiameter=sofa_device.spire_diameter,
                    spireHeight=sofa_device.spire_height,
                    nbBeams=straight_beams,  # Use same beam count as straight for simplicity
                    nbEdgesCollis=self._to_int_sum(sofa_device.num_edges_collis),
                    nbEdgesVisu=sofa_device.num_edges,
                )
                materials_ref += " @SpireSection_" + device.name
                total_device_beams += straight_beams  # Spire adds another section

            device_beam_counts.append(total_device_beams)

            # Create WireRestShape and reference the materials
            wire_rest_shape = topo_lines.addObject(
                "WireRestShape",
                name="rest_shape_" + device.name,
                template="Rigid3d",
                wireMaterials=materials_ref,
            )
            self._set_component_data(wire_rest_shape, "printLog", True)
            topo_lines.addObject(
                "EdgeSetTopologyContainer", name="meshLines_" + device.name
            )
            topo_lines.addObject("EdgeSetTopologyModifier", name="Modifier")
            topo_lines.addObject(
                "EdgeSetGeometryAlgorithms", name="GeomAlgo", template="Rigid3d"
            )
            topo_lines.addObject(
                "MechanicalObject", name="dofTopo_" + device.name, template="Rigid3d"
            )

        instruments_combined = self.root.addChild("InstrumentCombined")
        instruments_combined.addObject(
            "EulerImplicitSolver", rayleighStiffness=0.2, rayleighMass=0.1
        )
        instruments_combined.addObject(
            "BTDLinearSolver", verification=False, subpartSolve=False, verbose=False
        )
        # Total beams across all devices
        nx = sum(device_beam_counts)

        instruments_combined.addObject(
            "RegularGridTopology",
            name="MeshLines",
            nx=nx + 1,
            ny=1,
            nz=1,
            xmax=1.0,
            xmin=0.0,
            ymin=0,
            ymax=0,
            zmax=1,
            zmin=1,
            p0=insertion_point, # Starting point, must be set!
        )
        instruments_combined.addObject(
            "MechanicalObject",
            showIndices=False,
            name="DOFs",
            template="Rigid3d",
        )
        x_tip = []
        rotations = []
        interpolations = ""

        for device in devices:
            wire_rest_shape = (
                "@../topolines_" + device.name + "/rest_shape_" + device.name
            )
            interpolation = instruments_combined.addObject(
                "WireBeamInterpolation",
                name="Interpol_" + device.name,
                WireRestShape=wire_rest_shape,
            )
            self._set_component_data(
                interpolation, "radius", device.sofa_device.radius
            )
            self._set_component_data(interpolation, "printLog", False)
            force_field = instruments_combined.addObject(
                "AdaptiveBeamForceFieldAndMass",
                name="ForceField_" + device.name,
                interpolation="@Interpol_" + device.name,
            )
            self._set_component_data(
                force_field, "massDensity", device.sofa_device.mass_density
            )
            x_tip.append(0.0)
            rotations.append(self._rng.random() * math.pi * 2)
            interpolations += "Interpol_" + device.name + " "
        x_tip[0] += 0.1
        interpolations = interpolations[:-1]


        controller = instruments_combined.addObject(
            "InterventionalRadiologyController",
            name="m_ircontroller",
            template="Rigid3d",
            instruments=interpolations,
        )
        self._set_component_data(controller, "startingPos", insertion_pose)
        self._set_component_data(controller, "xtip", x_tip)
        self._set_component_data(controller, "printLog", True)
        self._set_component_data(controller, "rotationInstrument", rotations)
        self._set_component_data(controller, "speed", 0.0)
        self._set_component_data(controller, "listening", True)
        self._set_component_data(controller, "controlledInstrument", 0)
        print(f"[Sofa] startingPos={np.round(insertion_pose,2)} xtip0={x_tip[0]:.3f}")
        # Align initial DOFs with insertion pose to avoid orthogonal rest shape
        try:
            n_nodes = nx + 1
            initial_pose = np.asarray(insertion_pose, dtype=float)
            init_positions = np.tile(initial_pose, (n_nodes, 1))
            instruments_combined.DOFs.position.value = init_positions
        except Exception as exc:
            self.logger.debug("Could not set initial DOFs position: %s", exc)

        # Debug initial DOFs alignment
        dofs_pos = instruments_combined.DOFs.position.value
        if dofs_pos is not None and len(dofs_pos) > 0:
            base = np.round(dofs_pos[-1][0:3], 2)
            tip = np.round(dofs_pos[0][0:3], 2)
            print(f"[Sofa] DOFs base={base} tip={tip}")

        constraint_correction = instruments_combined.addObject(
            "LinearSolverConstraintCorrection"
        )
        self._set_component_data(constraint_correction, "wire_optimization", True)
        self._set_component_data(constraint_correction, "printLog", False)
        instruments_combined.addObject(
            "FixedConstraint", indices=0, name="FixedConstraint"
        )
        rest_shape_force_field = instruments_combined.addObject(
            "RestShapeSpringsForceField",
            points="@m_ircontroller.indexFirstNode",
        )
        self._set_component_data(rest_shape_force_field, "angularStiffness", 1e8)
        self._set_component_data(rest_shape_force_field, "stiffness", 1e8)
        self._instruments_combined = instruments_combined

        beam_collis = instruments_combined.addChild("CollisionModel")
        beam_collis.activated = True
        beam_collis.addObject("EdgeSetTopologyContainer", name="collisEdgeSet")
        beam_collis.addObject("EdgeSetTopologyModifier", name="colliseEdgeModifier")
        beam_collis.addObject("MechanicalObject", name="CollisionDOFs")
        collis_map = beam_collis.addObject(
            "MultiAdaptiveBeamMapping",
            controller="../m_ircontroller",
            name="collisMap",
        )
        self._set_component_data(collis_map, "useCurvAbs", True)
        self._set_component_data(collis_map, "printLog", False)
        beam_collis.addObject("LineCollisionModel", proximity=0.0)
        beam_collis.addObject("PointCollisionModel", proximity=0.0)
        beam_collis.addObject("PointCollisionModel", proximity=0.0)

    def _add_visual(
        self,
        display_size: Tuple[int, int],
        coords_low: Tuple[float, float, float],
        coords_high: Tuple[float, float, float],
        target_size: float,
        interim_target_size: float,
        devices: List[Device],
        insertion_point=None,
        centerlines=None,
        vessel_visual_path: Optional[str] = None,
    ):
        coords_low = np.array(coords_low)
        coords_high = np.array(coords_high)
        self.root.addObject(
            "RequiredPlugin",
            pluginName="\
            Sofa.GL.Component.Rendering3D\
            Sofa.GL.Component.Shader",
        )

        # Vessel Tree
        if vessel_visual_path is None:
            visu_vessel = self._vessel_object.addChild("VisualVessel")
            visu_vessel.addObject(
            "OglModel",
            src="@../meshLoader",
            color=[1.0, 0.0, 0.0, 0.3],
            name="Visual",
            )
            visu_vessel.addObject(
            "IdentityMapping",
            input="@../dofs",
            output="@Visual",
            )
        else:
            visu_vessel = self._vessel_object.addChild("VisualVessel")
            visu_vessel.addObject(
            "MeshOBJLoader", name="loader", filename=vessel_visual_path
            )
            visu_vessel.addObject(
            "OglModel", name="Visual", src="@loader", color=[1.0, 0.0, 0.0, 0.3]
            )
            visu_vessel.addObject(
            "BarycentricMapping", input="@../dofs", output="@Visual"
            )

        # Centerlines (optional, for debugging insertion / alignment)
        if centerlines is not None:
            def _add_centerline(polyline, idx: int):
                polyline = np.asarray(polyline, dtype=float)
                if polyline.ndim != 2 or polyline.shape[0] < 2:
                    return
                cl_node = self.root.addChild(f"Centerlines_{idx}")
                cl_node.addObject(
                    "MechanicalObject",
                    name="mo",
                    position=polyline.tolist(),
                )
                edges = [[i, i + 1] for i in range(polyline.shape[0] - 1)]
                cl_node.addObject("EdgeSetTopologyContainer", edges=edges)
                cl_node.addObject("EdgeSetGeometryAlgorithms", template="Vec3d")
                cl_visu = cl_node.addChild("Visual")
                cl_visu.addObject(
                    "OglModel",
                    name="Visual",
                    edges="@../EdgeSetTopologyContainer.edges",
                    color=[0.1, 0.8, 1.0, 0.6],
                )
                cl_visu.addObject(
                    "IdentityMapping",
                    input="@../mo",
                    output="@Visual",
                )

            if isinstance(centerlines, (list, tuple)):
                for idx, poly in enumerate(centerlines):
                    _add_centerline(poly, idx)
            else:
                _add_centerline(centerlines, 0)

        # Devices
        for device in devices:
            visu_node = self._instruments_combined.addChild("Visu_" + device.name)
            visu_node.activated = True
            visu_node.addObject("MechanicalObject", name="Quads")
            visu_node.addObject(
                "QuadSetTopologyContainer", name="Container_" + device.name
            )
            visu_node.addObject("QuadSetTopologyModifier", name="Modifier")
            visu_node.addObject(
                "QuadSetGeometryAlgorithms",
                name="GeomAlgo",
                template="Vec3d",
            )
            mesh_lines = "@../../topolines_" + device.name + "/meshLines_" + device.name
            visu_node.addObject(
                "Edge2QuadTopologicalMapping",
                nbPointsOnEachCircle=10,
                radius=device.sofa_device.radius,
                flipNormals="true",
                input=mesh_lines,
                output="@Container_" + device.name,
            )
            adaptive_mapping = visu_node.addObject(
                "AdaptiveBeamMapping",
                name="VisuMap_" + device.name,
                interpolation="@../Interpol_" + device.name,
            )
            self._set_component_data(adaptive_mapping, "isMechanical", False)
            self._set_component_data(adaptive_mapping, "useCurvAbs", True)
            self._set_component_data(adaptive_mapping, "printLog", False)
            visu_ogl = visu_node.addChild("VisuOgl")
            visu_ogl.activated = True
            visu_ogl.addObject(
                "OglModel",
                color=device.color,
                quads="@../Container_" + device.name + ".quads",
                material="texture Ambient 1 0.2 0.2 0.2 0.0 Diffuse 1 1.0 1.0 1.0 1.0 Specular 1 1.0 1.0 1.0 1.0 Emissive 0 0.15 0.05 0.05 0.0 Shininess 1 20",
                name="Visual",
            )
            visu_ogl.addObject(
                "IdentityMapping",
                input="@../Quads",
                output="@Visual",
            )

        # Target
        # TODO: Fix necessary translation of ogl_model. Maybe unite_sphere.obj with center in origin?
        file_dir = os.path.dirname(os.path.realpath(__file__))
        mesh_path = os.path.join(file_dir, "util", "unit_sphere.stl")
        target_node = self.root.addChild("main_target")
        target_node.addObject(
            "MeshSTLLoader",
            name="loader",
            triangulate=True,
            filename=mesh_path,
            scale=target_size,
            translation=[0, 0, 0],
        )
        target_node.addObject(
            "MechanicalObject",
            src="@loader",
            translation=(0, 0, 0),
            template="Rigid3d",
            name="MechanicalObject",
        )
        size_half = target_size / 2
        # Create a child node for the visual model to avoid multiple BaseState in the same node.
        target_visual = target_node.addChild("Visual")
        target_visual.addObject(
            "OglModel",
            src="@../loader",
            color=[0.0, 0.9, 0.5, 0.8],
            translation=[0, 0, -size_half],
            material="texture Ambient 1 0.2 0.2 0.2 0.0 Diffuse 1 1.0 1.0 1.0 1.0 Specular 1 1.0 1.0 1.0 1.0 Emissive 0 0.15 0.05 0.05 0.0 Shininess 1 20",
            name="ogl_model",
        )
        target_visual.addObject("RigidMapping", input="@../MechanicalObject", output="@ogl_model")
        self.target_node = target_node

        # Insertion marker (visual only, no physics)
        if insertion_point is not None:
            insertion_node = self.root.addChild("insertion_marker")
            insertion_node.addObject(
                "MeshSTLLoader",
                name="loader",
                triangulate=True,
                filename=mesh_path,
                scale=max(1.0, target_size * 0.3),
                translation=insertion_point.tolist(),
            )
            insertion_node.addObject(
                "MechanicalObject",
                src="@loader",
                translation=insertion_point.tolist(),
                template="Rigid3d",
                name="MechanicalObject",
            )
            insertion_vis = insertion_node.addChild("Visual")
            insertion_vis.addObject(
                "OglModel",
                src="@../loader",
                color=[0.0, 0.2, 0.9, 0.9],
                translation=[0, 0, 0],
                name="ogl_model",
            )
            insertion_vis.addObject(
                "RigidMapping", input="@../MechanicalObject", output="@ogl_model"
            )

        self.interim_targets = []
        interim_target_node = self.root.addChild("interim_target")
        interim_target_node.addObject(
            "MeshSTLLoader",
            name="loader",
            triangulate=True,
            filename=mesh_path,
            scale=interim_target_size,
            translation=[0, 0, 0],
        )
        interim_target_node.addObject(
            "MechanicalObject",
            src="@loader",
            translation=(9999, 0, 0),
            template="Rigid3d",
            name="MechanicalObject",
        )
        self.interim_target_node = interim_target_node
        for i in range(100):
            interim_node = self.interim_target_node.addChild(f"interim_node_{i}")

            interim_node.addObject(
                "OglModel",
                src="@../loader",
                color=[0.0, 0.9, 0.5, 0.2],
                translation=[0.0, 0.0, 0.0],
                material="texture Ambient 1 0.2 0.2 0.2 0.0 Diffuse 1 1.0 1.0 1.0 1.0 Specular 1 1.0 1.0 1.0 1.0 Emissive 0 0.15 0.05 0.05 0.0 Shininess 1 20",
                name="ogl_model",
            )
            self.interim_targets.append(interim_node)

        # Camera
        # TODO: Find out how to manipulate background. BackgroundSetting doesn't seem to work
        # self.root.addObject("BackgroundSetting", color=(0.5, 0.5, 0.5, 1.0))
        self.root.addObject("DefaultVisualManagerLoop")
        self.root.addObject(
            "VisualStyle",
            displayFlags="showVisualModels\
                hideBehaviorModels\
                hideCollisionModels\
                hideWireframe\
                hideMappings\
                hideForceFields",
        )
        self.root.addObject("LightManager")
        self.root.addObject("DirectionalLight", direction=[0, -1, 0])
        self.root.addObject("DirectionalLight", direction=[0, 1, 0])

        look_at = (coords_high + coords_low) * 0.5
        distance_coefficient = 1.5
        distance = np.linalg.norm(look_at - coords_low) * distance_coefficient
        position = look_at + np.array([0.0, -distance, 0.0])
        scene_radius = np.linalg.norm(coords_high - coords_low)
        dist_cam_to_center = np.linalg.norm(position - look_at)
        z_clipping_coeff = 5
        z_near_coeff = 0.01
        z_near = dist_cam_to_center - scene_radius
        z_far = (z_near + 2 * scene_radius) * 2
        z_near = z_near * z_near_coeff
        z_min = z_near_coeff * z_clipping_coeff * scene_radius
        if z_near < z_min:
            z_near = z_min
        field_of_view = 70
        look_at = np.array(look_at)
        position = np.array(position)

        self.camera = self.root.addObject(
            "Camera",
            name="camera",
            position=position.tolist(),
        )
        self._set_component_data(self.camera, "lookAt", look_at.tolist())
        self._set_component_data(self.camera, "fieldOfView", field_of_view)
        self._set_component_data(self.camera, "widthViewport", int(display_size[0]))
        self._set_component_data(self.camera, "heightViewport", int(display_size[1]))
        self._set_component_data(self.camera, "zNear", float(z_near))
        self._set_component_data(self.camera, "zFar", float(z_far))

    @staticmethod
    def _legacy_to_snake_case(name: str) -> str:
        return re.sub(r"(?<!^)(?=[A-Z])", "_", name).lower()

    def _set_component_data(self, component, legacy_name: str, value) -> bool:
        if component is None or not hasattr(component, "findData"):
            return False
        data = component.findData(legacy_name)
        if data is None:
            snake_name = self._legacy_to_snake_case(legacy_name)
            if snake_name != legacy_name:
                data = component.findData(snake_name)
        if data is None:
            self.logger.debug(
                "Data '%s' not found on component '%s'",
                legacy_name,
                getattr(component, "name", type(component).__name__),
            )
            return False
        if value is None:
            return True
        try:
            data.value = value
            return True
        except Exception:
            if isinstance(value, bool):
                try:
                    data.value = "true" if value else "false"
                    return True
                except Exception:
                    pass
            if isinstance(value, (list, tuple, np.ndarray)):
                try:
                    flattened = np.asarray(value).flatten()
                    data.value = " ".join(map(str, flattened))
                    return True
                except Exception:
                    pass
            self.logger.debug(
                "Failed to set data '%s' on component '%s'",
                getattr(data, "getName", lambda: legacy_name)(),
                getattr(component, "name", type(component).__name__),
            )
            return False

    def _to_int_sum(self, value, default: int = 0) -> int:
        """
        Convert a scalar or iterable of numbers to an int. If iterable (list/tuple/ndarray),
        sum the values. If conversion fails, return default.
        """
        if value is None:
            return default
        if isinstance(value, (list, tuple, np.ndarray)):
            try:
                return int(np.sum(value))
            except Exception:
                return default
        try:
            return int(value)
        except Exception:
            return default

    def add_interim_targets(
        self, positions: Optional[List[Tuple[float, float, float]]]
    ):
        if self.interim_target_node is None:
            return []
        if positions is None:
            positions_list: List[List[float]] = []
        elif isinstance(positions, np.ndarray):
            if positions.ndim == 1:
                positions_list = [positions.astype(float).tolist()]
            else:
                positions_list = [
                    np.asarray(p, dtype=float).tolist() for p in positions
                ]
        else:
            positions_list = [np.asarray(p, dtype=float).tolist() for p in positions]
        n_targets = min(len(positions_list), len(self.interim_targets))
        for index in range(n_targets):
            self.interim_targets[index].ogl_model.translation = positions_list[index]
        offscreen = [9999.0, 0.0, 0.0]
        for index in range(n_targets, len(self.interim_targets)):
            self.interim_targets[index].ogl_model.translation = list(offscreen)
        if self._sofa is not None:
            self._sofa.Simulation.init(self.interim_target_node)
        return self.interim_targets[:n_targets]

    def remove_interim_target(self, interim_target):
        self.interim_target_node.removeChild(interim_target)
        self.interim_targets.remove(interim_target)

    @staticmethod
    def _calculate_insertion_pose(
        insertion_point: np.ndarray, insertion_direction: np.ndarray
    ):
        # Align +X with the insertion direction using a robust quaternion build
        target = insertion_direction / np.linalg.norm(insertion_direction)
        source = np.array([1.0, 0.0, 0.0])
        dot = float(np.dot(source, target))
        if dot > 1.0:
            dot = 1.0
        if dot < -1.0:
            dot = -1.0

        if np.isclose(dot, 1.0):
            # Already aligned
            q_xyz = np.array([0.0, 0.0, 0.0])
            q_w = 1.0
        elif np.isclose(dot, -1.0):
            # Opposite; rotate 180° about any orthogonal axis (use Y)
            q_xyz = np.array([0.0, 1.0, 0.0])
            q_w = 0.0
        else:
            axis = np.cross(source, target)
            axis_norm = np.linalg.norm(axis)
            axis = axis / axis_norm
            half = np.sqrt((1.0 + dot) / 2.0)
            q_xyz = axis * np.sqrt((1.0 - dot) / 2.0)
            q_w = half

        pose = list(insertion_point) + list(q_xyz) + [q_w]
        return pose
